// COMSOL Multiphysics 5.4.0.225 model "Untitled.mph"
// Outline of the model tree

Parameters
  me = 9.31E-31[kg]

Variables
  var1 "Variables 1" on domains 1
    delta = 0
    V = 0
  var2 "Variables 2" on domains 3
    delta = 0.5*e_const
    V = 0
  var3 "Variables 3" on domains 2
    delta = 0
    V = 0*e_const

Geometry
  geom1 "Geometry 1" (1D, length unit nm)
    i1: Interval | coord = {-100, -0.1, 0.1, 100}
    fin: Finalize "Form Union"

Physics
  c: CoefficientFormPDE on all domains
    dependent variable u2
    cfeq1: CoefficientFormPDE (default) | c = hbar_const^2/(2*me); a = V; f = -delta*comp1.u; ea = 0; da = 1
    zflx1: ZeroFluxBoundary "Zero Flux 1" (default)
    init1: init "Initial Values 1" (default)
    flux1: FluxBoundary "Flux/Source 1" on boundaries 1 | g = 1
  c2: CoefficientFormPDE on all domains
    dependent variable u
    cfeq1: CoefficientFormPDE (default) | c = -hbar_const^2/(2*me); a = -V; f = -delta*comp1.u2; ea = 0; da = 1
    zflx1: ZeroFluxBoundary "Zero Flux 1" (default)
    init1: init "Initial Values 1" (default)
    flux1: FluxBoundary "Flux/Source 1" on boundaries 1 | g = 0

Mesh
  mesh1 "Mesh 1" (physics-controlled)
    size: MeshSizeDefault | hauto = 1

Studies
  std1 "Study 1"
    eigv: Eigenvalue
      eigmethod = region
      neigs = 100
      appnreigs = 150
      maxnreigs = 150
      eiglr = 1*e_const
      eigli = 1*e_const
      maxmatsize = 10
    stat: Stationary (disabled) | useinitsol = on; initmethod = sol; initstudy = std1

Solver configurations
  sol1 "Solution 1" (study std1)
    v1: Variables "Dependent Variables 1"
    e1: Eigenvalue "Eigenvalue Solver 1"
      dDef: Direct

Datasets
  dset1: Solution | solution = sol1

Derived values
  pev1: EvalPoint "Point Evaluation 1" on boundaries 4 | data = dset1; table = tbl1; expr = abs(u2)
  pev2: EvalPoint "Point Evaluation 2" on boundaries 1 | data = dset1; table = tbl2; expr = abs(u)

Tables
  tbl1: Table
    // Point Evaluation 1 (abs(u2))
    Eigenvalue (rad/s) | abs(u2) (1), Point: 4
    2.61651e-20+3.3289e-34i | 1.26302e-15
    2.72982e-20+3.3289e-34i | 1.09209e-14
    2.85377e-20+9.24694e-36i | 6.00649e-15
    3.09549e-20+7.39755e-35i | 6.70899e-15
    3.46089e-20+6.84273e-34i | 6.94569e-15
    3.61137e-20+5.08582e-34i | 1.1722e-14
    4.02081e-20+5.36322e-34i | 1.30106e-14
    4.17173e-20+5.17829e-34i | 2.58906e-14
    4.34241e-20+2.68161e-34i | 1.18458e-14
    4.52107e-20+4.16112e-34i | 2.52771e-14
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  tbl2: Table
    // Point Evaluation 2 (abs(u))
    Eigenvalue (rad/s) | abs(u) (1), Point: 1
    2.61651e-20+3.3289e-34i | 6.41239e-16
    2.72982e-20+3.3289e-34i | 8.06696e-15
    2.85377e-20+9.24694e-36i | 1.06183e-14
    3.09549e-20+7.39755e-35i | 1.08387e-14
    3.46089e-20+6.84273e-34i | 3.14177e-15
    3.61137e-20+5.08582e-34i | 8.88386e-15
    4.02081e-20+5.36322e-34i | 1.04934e-15
    4.17173e-20+5.17829e-34i | 1.70746e-15
    4.34241e-20+2.68161e-34i | 3.94699e-15
    4.52107e-20+4.16112e-34i | 5.13678e-15
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
Plots
  pg1: PlotGroup1D "1D Plot Group 1" | data = dset1
    lngr2: LineGraph on all domains | expr = u; unit = 1; descr = Dependent variable u; xdata = expr; xdataexpr = X
    lngr3: LineGraph on all domains | expr = u2
    lngr4: LineGraph | expr = u2
  pg2: PlotGroup1D "1D Plot Group 2" | data = dset1
    tblp1: Table "Table Graph 1" | table = tbl1; xaxisdata = 1
    tblp2: Table "Table Graph 2" | table = tbl2; xaxisdata = 1