// COMSOL Multiphysics 5.4.0.225 model "trial.mph"
// Outline of the model tree

Parameters
  l = 20[nm]
  En = 0.1[eV]

Geometry
  geom1 "Geometry 1" (1D, length unit nm)
    i1: Interval | coord = {-8*l, -7*l, -6*l, -5*l, -4*l, -3*l, -2*l, -l, 0, l}
    fin: Finalize "Form Union"

Physics
  schr: SchrodingerEquation "Schrödinger Equation" on all domains
    dependent variable psi
    ShapeProperty.order = 2
    EquationForm.form = Stationary
    ModelProperties.E = En
    meff1: EffectiveMass (default)
    ve1: ElectronPotentialEnergy (default) | Ve_src = userdef; Ve = 0
    zflx1: ZeroFlux (default)
    init1: init "Initial Values 1" (default)
    open1: OpenBoundary on boundaries 1 | incomingWave = 1
    open2: OpenBoundary on boundaries 10
    ve2: ElectronPotentialEnergy on domains 2 | V0 = 1[eV]; Ve_src = userdef; Ve = 1[eV]
    ve3: ElectronPotentialEnergy on domains 3 | V0 = 1[eV]; Ve_src = userdef; Ve = 1.5[eV]
    ve4: ElectronPotentialEnergy on domains 4 | V0 = 1[eV]; Ve_src = userdef; Ve = 2[eV]
    ve5: ElectronPotentialEnergy on domains 5 | V0 = 1[eV]; Ve_src = userdef; Ve = 2.5[eV]
    ve6: ElectronPotentialEnergy on domains 6 | V0 = 1[eV]; Ve_src = userdef; Ve = 3[eV]
    ve7: ElectronPotentialEnergy on domains 7 | V0 = 1[eV]; Ve_src = userdef; Ve = 3.5[eV]

Mesh
  mesh1 "Mesh 1" (physics-controlled)
    size: MeshSizeDefault | hauto = 4

Studies
  std1 "Study 1"
    param: Parametric "Parametric Sweep" | pname = En; plistarr = range(0,0.1,4)[eV]; punit = J
    stat: Stationary

Solver configurations
  sol1 "Solution 1" (study std1)
    v1: Variables "Dependent Variables 1"
    s1: Stationary "Stationary Solver 1"
      dDef: Direct
      p1: Parametric | pname = En; plistarr = range(0,0.1,4)[eV]; punit = J; pcontinuationmode = no
      fc1: FullyCoupled | linsolver = dDef

Datasets
  dset1: Solution | solution = sol1

Plots
  pg1: PlotGroup1D "Wave Function (schr)" | data = dset1
    lngr1: LineGraph "Real Part" on all domains | expr = psi; xdata = expr; xdataexpr = X
    lngr2: LineGraph "Imaginary Part" on domains 8 | expr = imag(psi); xdata = expr; xdataexpr = X
    lngr3: LineGraph on all domains | expr = abs(psi)^2; xdata = expr; xdataexpr = X
  pg2: PlotGroup1D "Potential Energy, Energy, and Wave Function (schr)" | data = dset1
    lngr1: LineGraph "Potential Energy" on all domains | expr = schr.V; unit = eV; xdata = expr; xdataexpr = X
    lngr2: LineGraph "Real Part" on all domains
      expr = psi*0.1[eV]/schr.plot_fac+schr.E
      unit = eV
      xdata = expr
      xdataexpr = X
    lngr3: LineGraph "Imaginary Part" on domains 8
      expr = imag(psi)*0.1[eV]/schr.plot_fac+schr.E
      unit = eV
      xdata = expr
      xdataexpr = X
    lngr4: LineGraph "Energy" on all domains | expr = schr.E; unit = eV; xdata = expr; xdataexpr = X
  pg3: PlotGroup1D "Probability Density (schr)" | data = dset1
    lngr1: LineGraph on all domains | expr = schr.Pr; xdata = expr; xdataexpr = X
  pg4: PlotGroup1D "Potential Energy (schr)" | data = dset1
    lngr1: LineGraph on all domains | expr = schr.V; unit = eV; xdata = expr; xdataexpr = X
  pg5: PlotGroup1D "Effective Mass (schr)" | data = dset1
    lngr1: LineGraph on domains 8 | expr = schr.meff/me_const; xdata = expr; xdataexpr = X
  pg6: PlotGroup1D "1D Plot Group 6" | data = dset1
    glob1: Global | data = dset1; expr = abs(schr.open2.int(psi))^2